# 1) Получение системной матрицы А исходной ММ 4-го порядка с заданными собственными значениями -10, -2, -1, -0.5:
# Матрица подобия:
D := [-10, 0, 0, 0; 0, -5, 0, 0; 0, 0, -1, 0; 0, 0, 0, -0.5]
# произвольная невырожденная матрица:
B := [-2, -10, -5, 14; 12, -6, 10, -2; -6, 11, 3, -11; 14, 2, -7, -11]
_______________________________________________________________________________
# Проверка невырожденности матрицы B и нахождение собственных чисел матрицы подобия D
|B| = -3968
λ := eigenvals(D)
λ = [-10; -5; -1; -0.5]
_______________________________________________________________________________
# Вычисление системной матрицы A:
A := B^-1*D*B
A = [
    -3.0504, -44.6371, -14.7046, 56.9748;
    -1.46774, -89.0323, -25.879, 110.266;
    -3.47984, -10.1452, -6.76815, 15.2601;
    -1.29839, -66.4516, -19.4315, 82.3508
]
# 2) Нахождение собственных векторов матрицы A:
eigenvals(A) = [-10; -5; -1; -0.5]
Y := eigenvecs(A)
# Полученная матрица из собственных векторов (выводятся по столбцам, нормированы так, что их длины равны 1):
sqrt(Y[0, 0]^2 + Y[1, 0]^2 + Y[2, 0]^2 + Y[3, 0]^2) → 1.0
Y = [
    0.379009, 0.31893, -0.393187, 0.263195;
    0.734644, 0.755812, -0.705996, 0.701854;
    0.0968394, -0.0423713, -0.0687766, 0.229452;
    0.554322, 0.570295, -0.585016, 0.620871
]
_______________________________________________________________________________
# Проверка, где какое собственное значение и собственный вектор (т.е. какие у них индексы):
λ[0, 0] = -10
λ[1, 0] = -5
λ[2, 0] = -1
λ[3, 0] = -0.5
[Y[0, 0]; Y[1, 0]; Y[2, 0]; Y[3, 0]] = [0.379009; 0.734644; 0.0968394; 0.554322]
[Y[0, 1]; Y[1, 1]; Y[2, 1]; Y[3, 1]] = [0.31893; 0.755812; -0.0423713; 0.570295]
[Y[0, 2]; Y[1, 2]; Y[2, 2]; Y[3, 2]] = [-0.393187; -0.705996; -0.0687766; -0.585016]
[Y[0, 3]; Y[1, 3]; Y[2, 3]; Y[3, 3]] = [0.263195; 0.701854; 0.229452; 0.620871]
# Проверка, что собственное значение с индексом j отвечает собственному вектору, являющемуся j-м столбцом матрицы из собственныйх векторов (матрица Y):
A*[Y[0, 0]; Y[1, 0]; Y[2, 0]; Y[3, 0]] = [-3.79009; -7.34644; -0.968394; -5.54322]  # тождество
λ[0, 0]*[Y[0, 0]; Y[1, 0]; Y[2, 0]; Y[3, 0]] = [-3.79009; -7.34644; -0.968394; -5.54322]
_______________________________________________________________________________
# 3) Общий вид решения исходной системы 4-го порядка:
# [x1; x2; x3; x4] == C1*e^(λ[0, 0]*t)*[Y[0, 0]; Y[1, 0]; Y[2, 0]; Y[3, 0]] + C2*e^(λ[1, 0]*t)*[Y[0, 1]; Y[1, 1]; Y[2, 1]; Y[3, 1]] + C3*e^(λ[2, 0]*t)*[Y[0, 2]; Y[1, 2]; Y[2, 2]; Y[3, 2]]+C4*e^(λ[3, 0]*t)*[Y[0, 3]; Y[1, 3]; Y[2, 3]; Y[3, 3]]
# система
# (*)
# Нахождение констант интегрирования из равенства G=FC, где С- вектор констант, G - вектор начальных условий, F - матрица из собственных векторов:
# задаем начальные условия:
# вводим матрицу F (она же Y - матрица из собственных векторов):
G := [2; -1.5; 1; -2.5]
F := [
    Y[0, 0], Y[0, 1], Y[0, 2], Y[0, 3];
    Y[1, 0], Y[1, 1], Y[1, 2], Y[1, 3];
    Y[2, 0], Y[2, 1], Y[2, 2], Y[2, 3];
    Y[3, 0], Y[3, 1], Y[3, 2], Y[3, 3]
]
# находим вектор констант интегрирования из очевидного равенства С=F^-1G:
C := F^-1*G = [35.0181; -21.1266; 2.43308; -13.593]
C[0] → 35.0180776048
C[1] → -21.1265962182
# Т.о., решение исходной системы 4-го порядка имет вид: X=F*diag(C_0,C_1,C_2,C_3)*E, где diag(C_0,C_1,C_2,C_3) - диагональная матрица, на главной диагонали которой находятся Сi, E - вектор модальных функций из системы (*). Или, более кратко, X=H*E, где H=F*diag(C_0,C_1,C_2,C_3).
# Найдем матрицу H:
H := F*[C[0], 0, 0, 0; 0, C[1], 0, 0; 0, 0, C[2], 0; 0, 0, 0, C[3]] = [
    13.2722, -6.7379, -0.956653, -3.57762;
    25.7258, -15.9677, -1.71774, -9.54032;
    3.39113, 0.895161, -0.167339, -3.11895;
    19.4113, -12.0484, -1.42339, -8.43952
]
# Из равенства X=H*E находим вектор модальных функций согласно выражению E=H^-1*X:
# элементы ее первой строки:
(H^-1)[0, 0] = 0.0689655
(H^-1)[0, 1] = 0.344828
H^-1 = [
    0.0689655, 0.344828, 0.172414, -0.482759;
    0.25, -0.125, 0.208333, -0.0416667;
    -3, 5.5, 1.5, -5.5;
    0.307692, 0.043956, -0.153846, -0.241758
]
(H^-1)[0, 2] = 0.172414
(H^-1)[0, 3] = -0.482759
H^-1*[x1; x2; x3; x4] → [
    0.0689655172414*x1 + 0.344827586207*x2 + 0.172413793103*x3 + (-0.48275862069*x4);
    -0.0416666666667*x4 + 0.208333333333*x3 + 0.25*x1 + (-0.125*x2);
    5.50000000003*x2 + (-5.50000000003*x4) + (-3.00000000002*x1) + 1.50000000001*x3;
    0.307692307692*x1 + (-0.153846153846*x3) + 0.0439560439561*x2 + (-0.241758241758*x4)
]
# - в правой части получили выражения для модальных функций (по строкам: e_1, e_2, e_3, e_4)
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# 4) Формирование вырожденной модели.
# 4.1) Исключение переменной x1:
# Приравниваем к нулю первую строку матрицы H^-1 и находим коэффициенты голономной связи х1=α2*х2+α3*х3+α4*х4:
# 4.2) Исключение переменной x2:
# Приравниваем к нулю первую строку матрицы H^-1 и находим коэффициенты голономной связи х2=β1*х1+β3*х3+β4*х4:
α2 := (-1)*(H^-1)[0, 1]/(H^-1)[0, 0] = -5
α3 := (-1)*(H^-1)[0, 2]/(H^-1)[0, 0] = -2.5
α4 := (-1)*(H^-1)[0, 3]/(H^-1)[0, 0] = 7
β1 := (-1)*(H^-1)[0, 0]/(H^-1)[0, 1] = -0.2
β3 := (-1)*(H^-1)[0, 2]/(H^-1)[0, 1] = -0.5
β4 := (-1)*(H^-1)[0, 3]/(H^-1)[0, 1] = 1.4
# Сформируем матрицу вырожденной модели (исключена х1):
# Сформируем матрицу вырожденной модели (исключена х2):
Avir_x1 := [
    A[1, 1] + A[1, 0]*α2, A[1, 2] + A[1, 0]*α3, A[1, 3] + A[1, 0]*α4;
    A[2, 1] + A[2, 0]*α2, A[2, 2] + A[2, 0]*α3, A[2, 3] + A[2, 0]*α4;
    A[3, 1] + A[3, 0]*α2, A[3, 2] + A[3, 0]*α3, A[3, 3] + A[3, 0]*α4
] = [-81.6935, -22.2097, 99.9919; 7.25403, 1.93145, -9.09879; -59.9597, -16.1855, 73.2621]
Avir_x2 := [
    A[0, 0] + A[0, 1]*β1, A[0, 2] + A[0, 1]*β3, A[0, 3] + A[0, 1]*β4;
    A[2, 0] + A[2, 1]*β1, A[2, 2] + A[2, 1]*β3, A[2, 3] + A[2, 1]*β4;
    A[3, 0] + A[3, 1]*β1, A[3, 2] + A[3, 1]*β3, A[3, 3] + A[3, 1]*β4
] = [5.87702, 7.61391, -5.51714; -1.45081, -1.69556, 1.05685; 11.9919, 13.7944, -10.6815]
_______________________________________________________________________________
_______________________________________________________________________________
# Проверка, что собственные значения системной матрицы вырожденной модели равны трем с.з. из 4-х с.з. исходной модели:
# 4.3) Исключение переменной x3:
λ1 := eigenvals(Avir_x1)
# Приравниваем к нулю первую строку матрицы H^-1 и находим коэффициенты голономной связи х3=γ1*х1+γ2*х2+γ4*х4:
λ1 = [-5; -1; -0.5]
γ1 := (-1)*(H^-1)[0, 0]/(H^-1)[0, 2] = -0.4
γ2 := (-1)*(H^-1)[0, 1]/(H^-1)[0, 2] = -2
γ4 := (-1)*(H^-1)[0, 3]/(H^-1)[0, 2] = 2.8
Y1 := eigenvecs(Avir_x1) = [-0.797457, -0.767839, 0.727504; 0.0447059, -0.0748012, 0.237838; -0.601717, -0.636261, 0.643561]
# на всякий случай нашла и собств. векторы, но они ни о чем не говорят
_______________________________________________________________________________  # Сформируем матрицу вырожденной модели (исключена х3):
# 4.4) Исключение переменной x4:
Avir_x3 := [
    A[0, 0] + A[0, 2]*γ1, A[0, 1] + A[0, 2]*γ2, A[0, 3] + A[0, 2]*γ4;
    A[1, 0] + A[1, 2]*γ1, A[1, 1] + A[1, 2]*γ2, A[1, 3] + A[1, 2]*γ4;
    A[3, 0] + A[3, 2]*γ1, A[3, 1] + A[3, 2]*γ2, A[3, 3] + A[3, 2]*γ4
] = [2.83145, -15.2278, 15.8018; 8.88387, -37.2742, 37.8048; 6.47419, -27.5887, 27.9427]
# Приравниваем к нулю первую строку матрицы H^-1 и находим коэффициенты голономной связи х4=η1*х1+η2*х2+η3*x3:
_______________________________________________________________________________
η1 := (-1)*(H^-1)[0, 0]/(H^-1)[0, 3] = 0.142857
η2 := (-1)*(H^-1)[0, 1]/(H^-1)[0, 3] = 0.714286
η3 := (-1)*(H^-1)[0, 2]/(H^-1)[0, 3] = 0.357143
# Сформируем матрицу вырожденной модели (исключена х4):
Avir_x4 := [
    A[0, 0] + A[0, 3]*η1, A[0, 1] + A[0, 3]*η2, A[0, 2] + A[0, 3]*η3;
    A[1, 0] + A[1, 3]*η1, A[1, 1] + A[1, 3]*η2, A[1, 2] + A[1, 3]*η3;
    A[2, 0] + A[2, 3]*η1, A[2, 1] + A[2, 3]*η2, A[2, 2] + A[2, 3]*η3
] = [5.08885, -3.94081, 5.64351; 14.2846, -10.2707, 13.5017; -1.29983, 0.754896, -1.31812]
